PSO
сфера
F_best := [8.13468730306e-11; 2.86561061938e-8; 5.89594248322e-7; 3.96282028452e-6; □]
ξ := [1; 1; 1; 1; □]
I := [221; 283; 406; 744; □]
X := [2; 4; 8; 16; 32]
A := READPRN("C:\Users\Юрий\Desktop\.net\log\PSO\File_1.txt")
B := READPRN("C:\Users\Юрий\Desktop\.net\log\PSO\File_2.txt")
C := READPRN("C:\Users\Юрий\Desktop\.net\log\PSO\File_3.txt")
D := READPRN("C:\Users\Юрий\Desktop\.net\log\PSO\File_4.txt")
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Растригин
1
ξ := [1; 0.14; 0; 0; □]
1
I := [210; 335; 450; 785; □]
X := [2; 4; 8; 16; 32]
F_best := [3.9818814912e-11; 1.71626481915e-7; 1.98992085933; 2.98491266708; □]
1
A := READPRN("C:\Users\Юрий\Desktop\.net\log\PSO\File_5.txt")
B := READPRN("C:\Users\Юрий\Desktop\.net\log\PSO\File_6.txt")
C := READPRN("C:\Users\Юрий\Desktop\.net\log\PSO\File_7.txt")
D := READPRN("C:\Users\Юрий\Desktop\.net\log\PSO\File_8.txt")
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Розенброк
1
ξ := [1; 0.92; 0.85; 0.02; □]
1
I := [197; 377; 720; 1897; □]
X := [2; 4; 8; 16; 32]
F_best := [1.0079963809e-9; 1.59756195408e-8; 2.00762968131e-7; 3.91756740514e-5; □]
1
A := READPRN("C:\Users\Юрий\Desktop\.net\log\PSO\File_9.txt")
B := READPRN("C:\Users\Юрий\Desktop\.net\log\PSO\File_10.txt")
C := READPRN("C:\Users\Юрий\Desktop\.net\log\PSO\File_11.txt")
D := READPRN("C:\Users\Юрий\Desktop\.net\log\PSO\File_12.txt")
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FIPS
сфера
F_best := [1.56487846293e-11; 1.76594870245e-9; 3.39827460395e-8; 6.55022767432e-7; □]
ξ := [1; 1; 1; 1; □]
I := [264; 2040; 2298; 2738; □]
X := [2; 4; 8; 16; 32]
A := READPRN("C:\Users\Юрий\Desktop\.net\log\FIPS\File_1.txt")
B := READPRN("C:\Users\Юрий\Desktop\.net\log\FIPS\File_2.txt")
C := READPRN("C:\Users\Юрий\Desktop\.net\log\FIPS\File_3.txt")
D := READPRN("C:\Users\Юрий\Desktop\.net\log\FIPS\File_4.txt")
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Растригин
1
1
I := [1807; 2179; 2329; 2729; □]
X := [2; 4; 8; 16; 32]
ξ := [0.99; 0.14; 0; 0; □]
[5.05188779698e-10; 6.72361721854e-8; 1.98991957608; 6.96473213062; □]
0.99
0.99
A := READPRN("C:\Users\Юрий\Desktop\.net\log\FIPS\File_5.txt")
B := READPRN("C:\Users\Юрий\Desktop\.net\log\FIPS\File_6.txt")
C := READPRN("C:\Users\Юрий\Desktop\.net\log\FIPS\File_7.txt")
D := READPRN("C:\Users\Юрий\Desktop\.net\log\FIPS\File_8.txt")
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Розенброк
F_best := [3.95282978079e-10; 2.77477369529e-9; 8.54828000996e-9; 2.6183030772; □]
ξ := [1; 0.83; 0.8; 0; □]
G := [1; 1; 1; 1; □]
I := [1657; 2182; 2526; 3346; □]
X := [2; 4; 8; 16; 32]
A := READPRN("C:\Users\Юрий\Desktop\.net\log\FIPS\File_9.txt")
B := READPRN("C:\Users\Юрий\Desktop\.net\log\FIPS\File_10.txt")
C := READPRN("C:\Users\Юрий\Desktop\.net\log\FIPS\File_11.txt")
D := READPRN("C:\Users\Юрий\Desktop\.net\log\FIPS\File_12.txt")
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DSPSO
сфера
1
F_best := [2.01588876601e-9; 8.22737264418e-8; 1.27467313566e-5; 0.00367684171007; □]
ξ := [1; 0.99; 0.36; 0.1; □]
1
I := [483; 1167; 3523; 10056; □]
X := [2; 4; 8; 16; 32]
1
A := READPRN("C:\Users\Юрий\Desktop\.net\log\DSPSO\File_1.txt")
B := READPRN("C:\Users\Юрий\Desktop\.net\log\DSPSO\File_2.txt")
C := READPRN("C:\Users\Юрий\Desktop\.net\log\DSPSO\File_3.txt")
D := READPRN("C:\Users\Юрий\Desktop\.net\log\DSPSO\File_4.txt")
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Растригин
1
F_best := [3.64790508911e-9; 1.26696080471e-5; 3.03007487854; 11.0019367387; □]
ξ := [1; 0.25; 0; 0; □]
1
I := [656; 1803; 3170; 4880; □]
X := [2; 4; 8; 16; 32]
1
A := READPRN("C:\Users\Юрий\Desktop\.net\log\DSPSO\File_5.txt")
B := READPRN("C:\Users\Юрий\Desktop\.net\log\DSPSO\File_6.txt")
C := READPRN("C:\Users\Юрий\Desktop\.net\log\DSPSO\File_7.txt")
D := READPRN("C:\Users\Юрий\Desktop\.net\log\DSPSO\File_8.txt")
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Розенброк
1
ξ := [1; 0.59; 0; 0; □]
1
I := [474; 1504; 3429; 8202; □]
X := [2; 4; 8; 16; 32]
F_best := [1.58830327887e-9; 7.43039754057e-6; 0.0828716565672; 10.7959670258; □]
1
A := READPRN("C:\Users\Юрий\Desktop\.net\log\DSPSO\File_9.txt")
B := READPRN("C:\Users\Юрий\Desktop\.net\log\DSPSO\File_10.txt")
C := READPRN("C:\Users\Юрий\Desktop\.net\log\DSPSO\File_11.txt")
D := READPRN("C:\Users\Юрий\Desktop\.net\log\DSPSO\File_12.txt")
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SDPSO_FIPS
сфера
F_best := [6.04344067131e-10; 1.51067100693e-7; 1.06866472427e-6; 0.0304397371067; □]
ξ := [1; 1; 1; 0.01; □]
I := [355; 623; 1186; 2129; □]
X := [2; 4; 8; 16; 32]
1
A := READPRN("C:\Users\Юрий\Desktop\.net\log\DSPSO_FIPS\File_1.txt")
B := READPRN("C:\Users\Юрий\Desktop\.net\log\DSPSO_FIPS\File_2.txt")
C := READPRN("C:\Users\Юрий\Desktop\.net\log\DSPSO_FIPS\File_3.txt")
D := READPRN("C:\Users\Юрий\Desktop\.net\log\DSPSO_FIPS\File_4.txt")
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Растригин
1
F_best := [3.27538884903e-10; 6.08256361971e-5; 3.4000583324; □; □]
ξ := [1; 0.19; 0; □; □]
1
I := [521; 36526; 49069; □; □]
X := [2; 4; 8; 16; 32]
A := READPRN("C:\Users\Юрий\Desktop\.net\log\DSPSO_FIPS\File_5.txt")
B := READPRN("C:\Users\Юрий\Desktop\.net\log\DSPSO_FIPS\File_6.txt")
C := READPRN("C:\Users\Юрий\Desktop\.net\log\DSPSO_FIPS\File_7.txt")
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Розенброк
ξ := [1; 1; 0.85; 0; □]
1
I := [345; 1140; 3444; 4288; □]
X := [2; 4; 8; 16; 32]
F_best := [4.47479111667e-10; 1.00686463436e-9; 5.83449603689e-6; 8.07507793679; □]
1
A := READPRN("C:\Users\Юрий\Desktop\.net\log\DSPSO_FIPS\File_8.txt")
B := READPRN("C:\Users\Юрий\Desktop\.net\log\DSPSO_FIPS\File_9.txt")
C := READPRN("C:\Users\Юрий\Desktop\.net\log\DSPSO_FIPS\File_10.txt")
D := READPRN("C:\Users\Юрий\Desktop\.net\log\DSPSO_FIPS\File_11.txt")
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