PSO
сфера
F_best := [2.19975429626e-10; 3.73482456577e-10; 1.92258809421e-10; □; □]
ξ := [1; 1; 0.57; □; □]
I := [724; 2806; 10079; □; □]
X := [2; 4; 8; 16; 32]
Растригин
F_best := [5.72377700792e-10; 3.55129259333e-11; 1.78648290079e-9; □; □]
ξ := [1; 1; 0.07; □; □]
I := [973; 4079; 2803; □; □]
X := [2; 4; 8; 16; 32]
Розенброк
ξ := [0.85; 0.04; 0; □; □]
I := [3240; 7134; 0; □; □]
X := [2; 4; 8; 16; 32]
F_best := [2.54921579417e-9; 0.00010873853098; 3453.83166907; □; □]
FiPS
сфера
F_best := [8.29276351434e-11; □; □; □; □]
ξ := [1; □; □; □; □]
I := [164; □; □; □; □]
X := [2; 4; 8; 16; 32]
Растригин
F_best := [□; □; □; □; □]
ξ := [□; □; □; □; □]
I := [□; □; □; □; □]
X := [2; 4; 8; 16; 32]
Розенброк
ξ := [□; □; 0; □; □]
I := [□; □; 0; □; □]
X := [2; 4; 8; 16; 32]
F_best := [□; □; □; □; □]
SDPSO
сфера
F_best := [□; □; □; □; □]
ξ := [1; □; □; □; □]
I := [□; □; □; □; □]
X := [2; 4; 8; 16; 32]
Растригин
F_best := [□; □; □; □; □]
ξ := [□; □; □; □; □]
I := [□; □; □; □; □]
X := [2; 4; 8; 16; 32]
Розенброк
ξ := [□; □; 0; □; □]
I := [□; □; 0; □; □]
X := [2; 4; 8; 16; 32]
F_best := [□; □; □; □; □]
