A := READPRN("C:\Users\Юрий\Desktop\.net\log\SDPSO\File_0.txt")
B := READPRN("C:\Users\Юрий\Desktop\.net\log\SDPSO\File_1.txt")
C := READPRN("C:\Users\Юрий\Desktop\.net\log\SDPSO\File_2.txt")
D := READPRN("C:\Users\Юрий\Desktop\.net\log\SDPSO\File_3.txt")
E := READPRN("C:\Users\Юрий\Desktop\.net\log\SDPSO\File_4.txt")
# Функция сферы
x[i] = 0  # error: Эта переменная не определена.
f == 0
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B =  # no stored result
# Функция Швефеля
A := READPRN("C:\Users\Юрий\Desktop\.net\log\SDPSO\File_5.txt")
B := READPRN("C:\Users\Юрий\Desktop\.net\log\SDPSO\File_6.txt")
C := READPRN("C:\Users\Юрий\Desktop\.net\log\SDPSO\File_7.txt")
D := READPRN("C:\Users\Юрий\Desktop\.net\log\SDPSO\File_8.txt")
E := READPRN("C:\Users\Юрий\Desktop\.net\log\SDPSO\File_9.txt")
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x[i] = 420.96875  # error: Эта переменная не определена.
f == –418,98289
# Функция Растригина
A := READPRN("C:\Users\Юрий\Desktop\.net\log\SDPSO\File_10.txt")
B := READPRN("C:\Users\Юрий\Desktop\.net\log\SDPSO\File_11.txt")
C := READPRN("C:\Users\Юрий\Desktop\.net\log\SDPSO\File_12.txt")
D := READPRN("C:\Users\Юрий\Desktop\.net\log\SDPSO\File_13.txt")
E := READPRN("C:\Users\Юрий\Desktop\.net\log\SDPSO\File_14.txt")
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x[i] = 0  # error: Эта переменная не определена.
f == 0
# Функция Розенброка
A := READPRN("C:\Users\Юрий\Desktop\.net\log\SDPSO\File_15.txt")
B := READPRN("C:\Users\Юрий\Desktop\.net\log\SDPSO\File_16.txt")
C := READPRN("C:\Users\Юрий\Desktop\.net\log\SDPSO\File_17.txt")
D := READPRN("C:\Users\Юрий\Desktop\.net\log\SDPSO\File_18.txt")
E := READPRN("C:\Users\Юрий\Desktop\.net\log\SDPSO\File_19.txt")
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x[i] = 1  # error: Эта переменная не определена.
f == 0
