A := READPRN("C:\Users\Юрий\Desktop\.net\log\Mod\File_0.txt")
B := READPRN("C:\Users\Юрий\Desktop\.net\log\Mod\File_1.txt")
C := READPRN("C:\Users\Юрий\Desktop\.net\log\Mod\File_2.txt")
D := READPRN("C:\Users\Юрий\Desktop\.net\log\Mod\File_3.txt")
E := READPRN("C:\Users\Юрий\Desktop\.net\log\Mod\File_4.txt")
# Функция сферы
x[i] = 0  # error: Эта переменная не определена.
f == 0
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B = [
    0, 1357.55;
    1, 820.439;
    2, 244.049;
    3, 222.941;
    4, 221.678;
    5, 221.599;
    6, 117.558;
    7, 30.7166;
    8, 27.0047;
    9, 26.7827
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]
# Функция Швефеля
A := READPRN("C:\Users\Юрий\Desktop\.net\log\Mod\File_5.txt")
B := READPRN("C:\Users\Юрий\Desktop\.net\log\Mod\File_6.txt")
C := READPRN("C:\Users\Юрий\Desktop\.net\log\Mod\File_7.txt")
D := READPRN("C:\Users\Юрий\Desktop\.net\log\Mod\File_8.txt")
E := READPRN("C:\Users\Юрий\Desktop\.net\log\Mod\File_9.txt")
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x[i] = 420.96875  # error: Эта переменная не определена.
f == –418,98289
# Функция Растригина
A := READPRN("C:\Users\Юрий\Desktop\.net\log\Mod\File_10.txt")
B := READPRN("C:\Users\Юрий\Desktop\.net\log\Mod\File_11.txt")
C := READPRN("C:\Users\Юрий\Desktop\.net\log\Mod\File_12.txt")
D := READPRN("C:\Users\Юрий\Desktop\.net\log\Mod\File_13.txt")
E := READPRN("C:\Users\Юрий\Desktop\.net\log\Mod\File_14.txt")
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x[i] = 0  # error: Эта переменная не определена.
f == 0
# Функция Розенброка
A := READPRN("C:\Users\Юрий\Desktop\.net\log\Mod\File_15.txt")
B := READPRN("C:\Users\Юрий\Desktop\.net\log\Mod\File_16.txt")
C := READPRN("C:\Users\Юрий\Desktop\.net\log\Mod\File_17.txt")
D := READPRN("C:\Users\Юрий\Desktop\.net\log\Mod\File_18.txt")
E := READPRN("C:\Users\Юрий\Desktop\.net\log\Mod\File_19.txt")
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x[i] = 1  # error: Эта переменная не определена.
f == 0
