A := READPRN("C:\Users\Юрий\Desktop\.net\log\File_0.txt")
B := READPRN("C:\Users\Юрий\Desktop\.net\log\File_1.txt")
C := READPRN("C:\Users\Юрий\Desktop\.net\log\File_2.txt")
D := READPRN("C:\Users\Юрий\Desktop\.net\log\File_3.txt")
E := READPRN("C:\Users\Юрий\Desktop\.net\log\File_4.txt")
# Функция сферы
x[i] = 0  # error: Эта переменная не определена.
f == 0
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E = [
    0, 58377.2;
    1, 45695.8;
    2, 29848.8;
    3, 21465.2;
    4, 18950.3;
    5, 13425.5;
    6, 9933.63;
    7, 7485.17;
    8, 5443.15;
    9, 4296.91
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]
# Функция Швефеля
A := READPRN("C:\Users\Юрий\Desktop\.net\log\File_5.txt")
B := READPRN("C:\Users\Юрий\Desktop\.net\log\File_6.txt")
C := READPRN("C:\Users\Юрий\Desktop\.net\log\File_7.txt")
D := READPRN("C:\Users\Юрий\Desktop\.net\log\File_8.txt")
E := READPRN("C:\Users\Юрий\Desktop\.net\log\File_9.txt")
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x[i] = 420.96875  # error: Эта переменная не определена.
f == –418,98289
# Функция Растригина
A := READPRN("C:\Users\Юрий\Desktop\.net\log\File_10.txt")
B := READPRN("C:\Users\Юрий\Desktop\.net\log\File_11.txt")
C := READPRN("C:\Users\Юрий\Desktop\.net\log\File_12.txt")
D := READPRN("C:\Users\Юрий\Desktop\.net\log\File_13.txt")
E := READPRN("C:\Users\Юрий\Desktop\.net\log\File_14.txt")
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x[i] = 0  # error: Эта переменная не определена.
f == 0
# Функция Розенброка
A := READPRN("C:\Users\Юрий\Desktop\.net\log\File_15.txt")
B := READPRN("C:\Users\Юрий\Desktop\.net\log\File_16.txt")
C := READPRN("C:\Users\Юрий\Desktop\.net\log\File_17.txt")
D := READPRN("C:\Users\Юрий\Desktop\.net\log\File_18.txt")
E := READPRN("C:\Users\Юрий\Desktop\.net\log\File_19.txt")
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x[i] = 1  # error: Эта переменная не определена.
f == 0
